<?xml version="1.0"?>
<?xml-stylesheet type="text/xsl" href="http://jsbsim.sourceforge.net/JSBSim.xsl"?>
<fdm_config name="f22-jsbsim" version="2.0" release="ALPHA"
   xmlns:xsi="http://www.w3.org/2001/XMLSchema-instance"
   xsi:noNamespaceSchemaLocation="http://jsbsim.sourceforge.net/JSBSim.xsd">

 <fileheader>
  <author> Aeromatic v 0.96, ncc_42 </author>
  <filecreationdate>2017-10-19</filecreationdate>
  <version>$Revision: 1.30 $</version>
  <description> Models an F-22A. </description>
 </fileheader>

<!--
  File:     f22-jsbsim.xml
  Inputs:
    name:          f22-jsbsim
    type:          two-engine transonic/supersonic fighter
    max weight:    83500 lb
    wing span:     44.5 ft
    length:        62 ft
    wing area:     840 sq-ft
    gear type:     tricycle
    castering:
    retractable?:  yes
    # engines:     2
    engine type:   turbine
    engine layout: aft fuselage
    yaw damper?    yes
  Outputs:
    wing loading:  71.98 lb/sq-ft
    payload:       22875.5 lbs
    CL-alpha:      3.6 per radian
    CL-0:          0.08
    CL-max:        1
    CD-0:          0.024
    K:             0.12

-->

 <metrics>
   <wingarea  unit="FT2">  840.00 </wingarea>
   <wingspan  unit="FT" >   44.50 </wingspan>
   <wing_incidence>          0.00 </wing_incidence>
   <chord     unit="FT" >   18.88 </chord>
   <htailarea unit="FT2">   71.20 </htailarea>
   <htailarm  unit="FT" >   16.00 </htailarm>
   <vtailarea unit="FT2">   21.20 </vtailarea>
   <vtailarm  unit="FT" >    9.59 </vtailarm>
   <location name="AERORP" unit="IN">
     <x> 405.1  </x>
     <y>   0.00 </y>
     <z>   0.00 </z>
   </location>
   <location name="EYEPOINT" unit="IN">
     <x> 160.0  </x>
     <y>   0.00 </y>
     <z>  48.71 </z>
   </location>
   <location name="VRP" unit="IN">
     <x>380</x>
     <y>0</y>
     <z>31</z>
   </location>
 </metrics>

 <mass_balance>
   <ixx unit="SLUG*FT2">     56039 </ixx>
   <iyy unit="SLUG*FT2">    149525 </iyy>
   <izz unit="SLUG*FT2">    160391 </izz>
   <emptywt unit="LBS" >     43340 </emptywt>
   <location name="CG" unit="IN">
     <x> 426.1  </x>
     <y>   0.00 </y>
     <z>   0    </z>
   </location>
 </mass_balance>

 <ground_reactions>

  <contact type="BOGEY" name="NOSE">
   <location unit="IN">
     <x> 223.6  </x>
     <y>   0    </y>
     <z> -79.28 </z>
   </location>
   <static_friction>  0.80 </static_friction>
   <dynamic_friction> 0.50 </dynamic_friction>
   <rolling_friction> 0.02 </rolling_friction>
   <spring_coeff unit="LBS/FT">      25050.00 </spring_coeff>
   <damping_coeff unit="LBS/FT/SEC"> 12525.00 </damping_coeff>
   <max_steer unit="DEG"> 5.00 </max_steer>
   <brake_group>NONE</brake_group>
   <retractable>1</retractable>
  </contact>

  <contact type="BOGEY" name="LEFT_MAIN">
   <location unit="IN">
     <x> 443.5  </x>
     <y> -69.2  </y>
     <z> -78.28 </z>
   </location>
   <static_friction>  0.80 </static_friction>
   <dynamic_friction> 0.50 </dynamic_friction>
   <rolling_friction> 0.02 </rolling_friction>
   <spring_coeff unit="LBS/FT">      83500.00 </spring_coeff>
   <damping_coeff unit="LBS/FT/SEC"> 41750.00 </damping_coeff>
   <max_steer unit="DEG">0</max_steer>
   <brake_group>LEFT</brake_group>
   <retractable>1</retractable>
  </contact>

  <contact type="BOGEY" name="RIGHT_MAIN">
   <location unit="IN">
     <x> 443.5  </x>
     <y>  69.2  </y>
     <z> -78.28 </z>
   </location>
   <static_friction>  0.80 </static_friction>
   <dynamic_friction> 0.50 </dynamic_friction>
   <rolling_friction> 0.02 </rolling_friction>
   <spring_coeff unit="LBS/FT">      83500.00 </spring_coeff>
   <damping_coeff unit="LBS/FT/SEC"> 41750.00 </damping_coeff>
   <max_steer unit="DEG">0</max_steer>
   <brake_group>RIGHT</brake_group>
   <retractable>1</retractable>
  </contact>

  <contact type="STRUCTURE" name="LEFT_WING_TIP_FRONT">
    <location unit="IN">
     <x> 500.5  </x>
     <y>-534    </y>
     <z>   0    </z>
    </location>
    <static_friction>  1.00 </static_friction>
    <dynamic_friction> 1.00 </dynamic_friction>
    <spring_coeff unit="LBS/FT">      83500.00 </spring_coeff>
    <damping_coeff unit="LBS/FT/SEC"> 83500.00 </damping_coeff>
  </contact>

  <contact type="STRUCTURE" name="RIGHT_WING_TIP_FRONT">
    <location unit="IN">
     <x> 500.5  </x>
     <y> 534    </y>
     <z>   0    </z>
    </location>
    <static_friction>  1.00 </static_friction>
    <dynamic_friction> 1.00 </dynamic_friction>
    <spring_coeff unit="LBS/FT">      83500.00 </spring_coeff>
    <damping_coeff unit="LBS/FT/SEC"> 83500.00 </damping_coeff>
  </contact>

 </ground_reactions>

 <propulsion>

   <engine file="F119-PW-100">
    <location unit="IN">
      <x> 594.5  </x>
      <y> -24.92 </y>
      <z>   0.00 </z>
    </location>
    <orient unit="DEG">
      <pitch> 0.00 </pitch>
      <roll>  0.00 </roll>
      <yaw>   0.00 </yaw>
    </orient>
    <feed>0</feed>
    <thruster file="direct">
     <location unit="IN">
       <x> 594.5  </x>
       <y> -24.92 </y>
       <z>   0.00 </z>
     </location>
     <orient unit="DEG">
       <pitch> 0.00 </pitch>
       <roll>  0.00 </roll>
       <yaw>   0.00 </yaw>
     </orient>
    </thruster>
  </engine>

   <engine file="F119-PW-100">
    <location unit="IN">
      <x> 594.5  </x>
      <y>  24.92 </y>
      <z>   0.00 </z>
    </location>
    <orient unit="DEG">
      <pitch> 0.00 </pitch>
      <roll>  0.00 </roll>
      <yaw>   0.00 </yaw>
    </orient>
    <feed>1</feed>
    <thruster file="direct">
     <location unit="IN">
       <x> 594.5  </x>
       <y>  24.92 </y>
       <z>   0.00 </z>
     </location>
     <orient unit="DEG">
       <pitch> 0.00 </pitch>
       <roll>  0.00 </roll>
       <yaw>   0.00 </yaw>
     </orient>
    </thruster>
  </engine>

  <tank type="FUEL" number="0">
     <location unit="IN">
       <x> 400.1  </x>
       <y> -24.92 </y>
       <z>   0    </z>
     </location>
     <capacity unit="LBS"> 9000.00 </capacity>
     <contents unit="LBS"> 7500.00 </contents>
  </tank>

  <tank type="FUEL" number="1">
     <location unit="IN">
       <x> 400.1  </x>
       <y>  24.92 </y>
       <z>   0    </z>
     </location>
     <capacity unit="LBS"> 9000.00 </capacity>
     <contents unit="LBS"> 7500.00 </contents>
  </tank>

 </propulsion>

 <flight_control name="FCS: f22a">

   <function name="fcs/cqbar-psf"> <!-- calibrated qbar -->
    <sum>
     <product>
      <property>aero/qbar-psf</property>
      <table>
       <independentVar lookup="row">aero/qbar-psf</independentVar>
       <tableData>
         0.0  0
         0.4  1
       </tableData>
      </table>
     </product>
     <table>
      <independentVar lookup="row">aero/qbar-psf</independentVar>
      <tableData>
        0.0  0.4
        0.4  0.0
      </tableData>
     </table>
    </sum>
   </function>

   <function name="fcs/flap-cmd-auto">
    <product>
     <property>gear/gear-cmd-norm</property>
     <table>
      <independentVar lookup="row">velocities/ve-kts</independentVar>
      <tableData>
       165  1
       245  0
      </tableData>
     </table>
    </product>
   </function>

   <function name="fcs/pitch-rate-cmd-g">
    <quotient>
     <product>
      <property>velocities/ve-kts</property>
      <property>velocities/q-aero-rad_sec</property>
     </product>
     <value>19.06</value>
    </quotient>
   </function>

   <function name="fcs/pitch-rate-cmd-g-delayed">
    <quotient>
     <product>
      <property>velocities/ve-kts</property>
      <property>velocities/q-aero-rad_sec</property>
     </product>
     <product>
      <value>19.06</value>
     </product>
    </quotient>
    <delay type="time">0.1</delay>
   </function>

   <function name="fcs/pitch-rate-cmd-g-rate">
    <quotient>
     <difference>
      <property>fcs/pitch-rate-cmd-g</property>
      <property>fcs/pitch-rate-cmd-g-delayed</property>
     </difference>
     <value>0.1</value>
    </quotient>
   </function>

   <function name="fcs/pitch-cmd-comp">
    <product>
     <property>fcs/cqbar-psf</property>
     <value>840</value>
     <sum>

      <product>
       <property>aero/alpha-rad</property>
       <value>2.832</value>
      </product>

      <product>
       <property>aero/ci2vel</property>
       <property>velocities/q-aero-rad_sec</property>
       <value>-105.728</value>
      </product>

      <table>
       <independentVar lookup="row">aero/alpha-deg</independentVar>
       <tableData>
        -12 -1.120
         0   0.000
         17  2.100
         50  4.410
         60  4.025
         70  0.875
       </tableData>
      </table>

      <product>
       <property>fcs/flap-pos-deg</property>
       <value>0.0204225</value>
      </product>

      <product>
       <property>fcs/elevator-pos-deg2</property>
       <value>0.0035</value>
      </product>

     </sum>
    </product>
   </function>

   <function name="fcs/pitch-cmd-alpha-limit">
     <table>
      <independentVar lookup="row">aero/alpha-deg</independentVar>
      <tableData>
      -90  -2.0
      -70  -1.0
      -55   0.0
       0    0.0
       75   0.0
       90   1.0
       110  2.0
      </tableData>
     </table>
   </function>

   <function name="fcs/pitch-cmd-g-limit">
     <table>
      <independentVar lookup="row">accelerations/Nz</independentVar>
      <tableData>
      -3.5 -2.0
      -3.0 -1.0
      -2.5  0.0
       0.0  0.0
       7.5  0.0
       9.0  1.0
       9.5  2.0
      </tableData>
     </table>
   </function>

   <function name="fcs/pitch-cmd-g-rate-limit">
     <table>
      <independentVar lookup="row">fcs/pitch-rate-cmd-g-rate</independentVar>
      <tableData>
      -3.5 -9.0
      -3.0 -3.0
      -2.5  0.0
       0.0  0.0
       7.5  3.0
       9.0  9.0
       9.5  9.5
      </tableData>
     </table>
   </function>

   <function name="fcs/pitch-cmd-input-rate">
    <product>
    <difference>
     <table>
      <independentVar lookup="row">fcs/elevator-cmd-norm</independentVar>
      <independentVar lookup="column">accelerations/Nz</independentVar>
      <independentVar lookup="table">aero/alpha-deg</independentVar>
      <tableData breakPoint="-90">
           -3.5 -3.0 -2.5  0.0  8.5  8.9  9.5
       -1   9.0  9.0  9.0  9.0  9.0  8.5  5.0
        0   1.0  1.0  1.0  1.0  1.0  1.0  0.0
        1   1.0  1.0  1.0  1.0  1.0  1.0  0.0
      </tableData>
      <tableData breakPoint="-70">
           -3.5 -3.0 -2.5  0.0  8.5  8.9  9.5
       -1   9.0  9.0  9.0  9.0  9.0  8.5  5.0
        0   1.0  1.0  1.0  1.0  1.0  1.0  0.0
        1   0.0  0.0  0.0  0.0  0.0  0.0  0.0
      </tableData>
      <tableData breakPoint="-55">
           -3.5 -3.0 -2.5  0.0  8.5  8.9  9.5
       -1   9.0  9.0  9.0  9.0  9.0  8.5  5.0
        0   0.0  0.0  0.0  0.0  0.0  0.0  0.0
        1   0.0 -2.5 -3.0 -3.0 -3.0 -3.0 -3.0
      </tableData>
      <tableData breakPoint="0">
           -3.5 -3.0 -2.5  0.0  8.5  8.9  9.5
       -1   9.0  9.0  9.0  9.0  9.0  8.5  5.0
        0   0.0  0.0  0.0  0.0  0.0  0.0  0.0
        1   0.0 -2.5 -3.0 -3.0 -3.0 -3.0 -3.0
      </tableData>
      <tableData breakPoint="75">
           -3.5 -3.0 -2.5  0.0  8.5  8.9  9.5
       -1   9.0  9.0  9.0  9.0  9.0  8.5  5.0
        0   0.0  0.0  0.0  0.0  0.0  0.0  0.0
        1   0.0 -2.5 -3.0 -3.0 -3.0 -3.0 -3.0
      </tableData>
      <tableData breakPoint="90">
           -3.5 -3.0 -2.5  0.0  8.5  8.9  9.5
       -1   0.0  0.0  0.0  0.0  0.0  0.0  0.0
        0   0.0 -1.0 -1.0 -1.0 -1.0 -1.0 -1.0
        1   0.0 -2.5 -3.0 -3.0 -3.0 -3.0 -3.0
      </tableData>
      <tableData breakPoint="110">
           -3.5 -3.0 -2.5  0.0  8.5  8.9  9.5
       -1   0.0 -1.0 -1.0 -1.0 -1.0 -1.0 -1.0
        0   0.0 -1.0 -1.0 -1.0 -1.0 -1.0 -1.0
        1   0.0 -2.5 -3.0 -3.0 -3.0 -3.0 -3.0
      </tableData>
     </table>
     <property>fcs/pitch-rate-cmd-g</property>
    </difference>
    <value>-149525</value>
    </product>
   </function>

   <function name="fcs/pitch-cmd-effect">
    <sum>

     <product>
      <property>fcs/cqbar-psf</property>
      <value>840</value>
      <table>
       <independentVar lookup="row">velocities/mach</independentVar>
       <tableData>
         0   7.8
         2   2.4
       </tableData>
      </table>
     </product>

     <product>
      <sum>
       <property>propulsion/engine[0]/thrust-lbs</property>
       <property>propulsion/engine[1]/thrust-lbs</property>
      </sum>
      <value>15</value>
      <difference>
       <value>1</value>
       <property>gear/gear-pos-norm</property>
      </difference>
     </product>

    </sum>
   </function>

   <function name="fcs/pitch-cmd">
    <quotient>
     <sum>
      <property>fcs/pitch-cmd-comp</property>
      <property>fcs/pitch-cmd-input-rate</property>
     </sum>
     <property>fcs/pitch-cmd-effect</property>
    </quotient>
   </function>

   <function name="fcs/roll-cmd-comp">
    <product>
     <property>fcs/cqbar-psf</property>
     <value>840</value>
     <sum>
      <product>
       <property>aero/beta-rad</property>
       <value>-4.45</value>
      </product>
      <product>
       <property>aero/bi2vel</property>
       <property>velocities/p-aero-rad_sec</property>
       <value>-17.8</value>
       <table>
        <independentVar lookup="row">fcs/aileron-cmd-norm</independentVar>
        <tableData>
         -1   1
          0   0
          1   1
        </tableData>
       </table>
      </product>
      <product>
       <property>aero/bi2vel</property>
       <property>velocities/r-aero-rad_sec</property>
       <value>6.675</value>
      </product>
      <product>
       <property>fcs/rudder-pos-deg2</property>
       <value>0.007565</value>
      </product>
     </sum>
    </product>
   </function>

   <function name="fcs/roll-cmd-input-rate">
    <product>
    <difference>
     <table>
      <independentVar lookup="row">fcs/aileron-cmd-norm</independentVar>
      <tableData>
       -1  -4.537
        0   0.0
        1   4.537
      </tableData>
     </table>
     <property>velocities/p-aero-rad_sec</property>
    </difference>
    <value>-56039</value>
    </product>
   </function>

   <function name="fcs/roll-cmd-effect">
    <sum>

     <product>
      <property>fcs/cqbar-psf</property>
      <value>840</value>
      <table>
       <independentVar lookup="row">aero/alpha-deg</independentVar>
       <tableData>
        -17    -1.00125
         0     -4.45000
         50    -1.00125
       </tableData>
      </table>
     </product>

     <product>
      <value>0</value>
      <value>1</value>
     </product>

    </sum>
   </function>

   <function name="fcs/roll-cmd">
    <quotient>
     <sum>
      <property>fcs/roll-cmd-comp</property>
      <property>fcs/roll-cmd-input-rate</property>
     </sum>
     <property>fcs/roll-cmd-effect</property>
    </quotient>
   </function>

   <function name="fcs/yaw-cmd-comp">
    <product>
     <property>fcs/cqbar-psf</property>
     <value>0</value>
     <!-- <sum> -->
      <product>
       <property>aero/beta-rad</property>
       <value>5.34</value>
      </product>
      <!-- <product>
       <property>aero/bi2vel</property>
       <property>velocities/r-aero-rad_sec</property>
       <value>-6.675</value>
      </product>
     </sum> -->
    </product>
   </function>

   <function name="fcs/yaw-cmd-input-beta">
    <product>
     <difference>
      <table>
       <independentVar lookup="row">fcs/rudder-cmd-norm</independentVar>
       <tableData>
        -1  -20
         0   0
         1   20
       </tableData>
      </table>
      <property>aero/beta-deg</property>
     </difference>
     <table>
      <independentVar lookup="row">aero/alpha-deg</independentVar>
      <independentVar lookup="column">gear/unit/WOW</independentVar>
      <tableData>
            0  1
       -30  0  0
         0  1  0
        30  0  0
      </tableData>
     </table>
     <value>15000</value>
    </product>
   </function>

   <function name="fcs/yaw-cmd-input-rate">
    <product>
     <difference>
      <table>
       <independentVar lookup="row">fcs/rudder-cmd-norm</independentVar>
       <tableData>
        -1   0.5
         0   0.0
         1  -0.5
       </tableData>
      </table>
      <property>velocities/r-aero-rad_sec</property>
     </difference>
     <value>-149525</value>
    </product>
   </function>

   <function name="fcs/yaw-cmd-effect">
    <sum>

     <product>
      <property>fcs/cqbar-psf</property>
      <value>840</value>
      <table>
       <independentVar lookup="row">aero/alpha-rad</independentVar>
       <tableData>
        -2.66  -4.6725
        -1.01   0.0
         0.45   4.6725
         2.04   0.0
       </tableData>
      </table>
     </product>

     <product>
      <value>0</value>
      <value>1</value>
     </product>

    </sum>
   </function>

   <function name="fcs/yaw-cmd">
    <quotient>
     <sum>
      <!-- <property>fcs/yaw-cmd-comp</property> -->
      <property>fcs/yaw-cmd-input-beta</property>
      <property>fcs/yaw-cmd-input-rate</property>
     </sum>
     <property>fcs/yaw-cmd-effect</property>
    </quotient>
   </function>

   <function name="fcs/pitch-trim-sum-tvc">
    <product>
     <property>fcs/pitch-trim-sum</property>
     <difference>
      <value>1</value>
      <property>gear/gear-pos-norm</property>
     </difference>
    </product>
   </function>

  <channel name="Pitch">

   <summer name="Pitch Trim Sum">
      <input>fcs/pitch-cmd</input>
      <!-- <input>fcs/pitch-cmd-g-rate-limit</input> -->
      <clipto>
        <min> -1 </min>
        <max>  1 </max>
      </clipto>
   </summer>

   <aerosurface_scale name="Elevator Control">
      <input>fcs/pitch-trim-sum</input>
      <range>
        <min> -1.0 </min>
        <max>  1.0 </max>
      </range>
      <output>fcs/elevator-pos-deg</output>
   </aerosurface_scale>

   <kinematic name="Elevator Position">
      <input>fcs/elevator-pos-deg</input>
      <traverse>
        <setting>
          <position>-30</position>
          <time>0.417</time>
        </setting>
        <setting>
          <position>25</position>
          <time>0.500</time>
        </setting>
       </traverse>
      <output>fcs/elevator-pos-deg2</output>
   </kinematic>

   <aerosurface_scale name="elevator normalization">
      <input>fcs/elevator-pos-deg2</input>
      <domain>
        <min> -30 </min>
        <max>  25 </max>
      </domain>
      <range>
        <min> -1 </min>
        <max>  1 </max>
      </range>
      <output>fcs/elevator-pos-norm</output>
   </aerosurface_scale>

   <aerosurface_scale name="Thrust Vector Control">
      <input>fcs/pitch-trim-sum-tvc</input>
      <range>
        <min> -1 </min>
        <max>  1 </max>
      </range>
      <output>fcs/tv-pos-rad</output>
   </aerosurface_scale>

   <kinematic name="TV Position">
      <input>fcs/tv-pos-rad</input>
      <traverse>
        <setting>
          <position>-0.349</position>
          <time>0.5</time>
        </setting>
        <setting>
          <position>0.349</position>
          <time>0.5</time>
        </setting>
       </traverse>
      <output>fcs/tv-pos-rad2</output>
   </kinematic>

   <aerosurface_scale name="TV normalization">
      <input>fcs/tv-pos-rad2</input>
      <domain>
        <min> -0.349 </min>
        <max>  0.349 </max>
      </domain>
      <range>
        <min> -1 </min>
        <max>  1 </max>
      </range>
      <output>fcs/tvc-pos-norm</output>
   </aerosurface_scale>

  </channel>

  <channel name="Roll">

   <summer name="Roll Trim Sum">
      <input>fcs/roll-cmd</input>
      <clipto>
        <min> -1 </min>
        <max>  1 </max>
      </clipto>
   </summer>

   <aerosurface_scale name="Left Aileron Control">
      <input>fcs/roll-trim-sum</input>
      <range>
        <min> -1 </min>
        <max>  1 </max>
      </range>
      <output>fcs/left-aileron-pos-deg</output>
   </aerosurface_scale>

   <aerosurface_scale name="Right Aileron Control">
      <input>fcs/roll-trim-sum</input>
      <range>
        <min> -1 </min>
        <max>  1 </max>
      </range>
      <output>fcs/right-aileron-pos-deg</output>
   </aerosurface_scale>

   <kinematic name="Right Aileron Position">
      <input>fcs/right-aileron-pos-deg</input>
      <traverse>
        <setting>
          <position>-25</position>
          <time>0.357</time>
        </setting>
        <setting>
          <position>25</position>
          <time>0.357</time>
        </setting>
       </traverse>
      <output>fcs/right-aileron-pos-deg2</output>
   </kinematic>

   <kinematic name="Left Aileron Position">
      <input>fcs/left-aileron-pos-deg</input>
      <traverse>
        <setting>
          <position>-25</position>
          <time>0.357</time>
        </setting>
        <setting>
          <position>25</position>
          <time>0.357</time>
        </setting>
       </traverse>
      <output>fcs/left-aileron-pos-deg2</output>
   </kinematic>

   <aerosurface_scale name="left aileron normalization">
      <input>fcs/left-aileron-pos-deg2</input>
      <domain>
        <min> -25 </min>
        <max>  25 </max>
      </domain>
      <range>
        <min> -1 </min>
        <max>  1 </max>
      </range>
      <output>fcs/left-aileron-pos-norm</output>
   </aerosurface_scale>

   <aerosurface_scale name="right aileron normalization">
      <input>fcs/right-aileron-pos-deg2</input>
      <domain>
        <min> -25 </min>
        <max>  25 </max>
      </domain>
      <range>
        <min> -1 </min>
        <max>  1 </max>
      </range>
      <output>fcs/right-aileron-pos-norm</output>
   </aerosurface_scale>

  </channel>

  <channel name="Yaw">

   <summer name="Rudder Trim Sum">
      <input>fcs/yaw-cmd</input>
      <input>fcs/rudder-cmd-norm</input>
      <clipto>
        <min> -1 </min>
        <max>  1 </max>
      </clipto>
   </summer>

   <aerosurface_scale name="Rudder Control">
      <input>fcs/rudder-trim-sum</input>
      <range>
        <min> -1 </min>
        <max>  1 </max>
      </range>
      <output>fcs/rudder-pos-deg</output>
   </aerosurface_scale>

   <kinematic name="Rudder Position">
      <input>fcs/rudder-pos-deg</input>
      <traverse>
        <setting>
          <position>-30</position>
          <time>0.375</time>
        </setting>
        <setting>
          <position>30</position>
          <time>0.375</time>
        </setting>
       </traverse>
      <output>fcs/rudder-pos-deg2</output>
   </kinematic>

   <aerosurface_scale name="rudder normalization">
      <input>fcs/rudder-pos-deg2</input>
      <domain>
        <min> -30 </min>
        <max>  30 </max>
      </domain>
      <range>
        <min> -1 </min>
        <max>  1 </max>
      </range>
      <output>fcs/rudder-pos-norm</output>
   </aerosurface_scale>

  </channel>

  <channel name="Flaps">
   <kinematic name="Flaps Control">
     <input>fcs/flap-cmd-auto</input>
     <traverse>
       <setting>
          <position>  0 </position>
          <time>      0 </time>
       </setting>
       <setting>
          <position> 20 </position>
          <time>      1 </time>
       </setting>
       <setting>
          <position> 35  </position>
          <time>      1 </time>
       </setting>
     </traverse>
     <output>fcs/flap-pos-deg</output>
   </kinematic>

   <aerosurface_scale name="flap normalization">
      <input>fcs/flap-pos-deg</input>
      <domain>
        <min>  0 </min>
        <max> 35 </max>
      </domain>
      <range>
        <min> 0 </min>
        <max> 1 </max>
      </range>
      <output>fcs/flap-pos-norm</output>
   </aerosurface_scale>

  </channel>

  <channel name="Leading Edge Flaps">

   <summer name="LEF Sum">
      <input>aero/alpha-rad</input>
      <clipto>
        <min> 0 </min>
        <max> 0.61</max>
      </clipto>
   </summer>

   <kinematic name="LEF Control">
     <input>aero/alpha-rad</input> <!-- fcs/lef-sum -->
     <traverse>
       <setting>
          <position>  0 </position>
          <time>      0 </time>
       </setting>
       <setting>
          <position>  0.61 </position>
          <time>    1.17 </time>
       </setting>
     </traverse>
     <output>fcs/slat-pos-rad</output>
   </kinematic>

   <aerosurface_scale name="LEF normalization">
      <input>fcs/slat-pos-rad</input>
      <range>
        <min> 0 </min>
        <max> 0.61 </max>
      </range>
      <output>fcs/slat-pos-norm</output>
   </aerosurface_scale>

  </channel>

  <channel name="Landing Gear">
   <kinematic name="Gear Control">
     <input>gear/gear-cmd-norm</input>
     <traverse>
       <setting>
          <position> 0 </position>
          <time>     0 </time>
       </setting>
       <setting>
          <position> 1 </position>
          <time>     5 </time>
       </setting>
     </traverse>
     <output>gear/gear-pos-norm</output>
   </kinematic>

  </channel>

  <channel name="Speedbrake">
   <kinematic name="Speedbrake Control">
     <input>fcs/speedbrake-cmd-norm</input>
     <traverse>
       <setting>
          <position> 0 </position>
          <time>     0 </time>
       </setting>
       <setting>
          <position> 1 </position>
          <time>     1 </time>
       </setting>
     </traverse>
     <output>fcs/speedbrake-pos-norm</output>
   </kinematic>

  </channel>

 </flight_control>

 <aerodynamics>

  <axis name="LIFT">

    <function name="aero/force/Lift_alpha">
      <description>Lift due to alpha</description>
      <product>
          <property>aero/qbar-psf</property>
          <property>metrics/Sw-sqft</property>
          <table>
            <independentVar lookup="row">aero/alpha-deg</independentVar>
            <tableData>
              -12 -0.64
               0   0.00
               17  1.20
               50  2.52
               60  2.30
               70  0.50
            </tableData>
          </table>
      </product>
    </function>

    <function name="aero/force/Lift_flap">
       <description>Delta Lift due to flaps</description>
       <product>
           <property>aero/qbar-psf</property>
           <property>metrics/Sw-sqft</property>
           <property>fcs/flap-pos-deg</property>
           <value> 0.01167 </value>
       </product>
    </function>

    <function name="aero/force/Lift_elevator">
       <description>Lift due to Elevator Deflection</description>
       <product>
           <property>aero/qbar-psf</property>
           <property>metrics/Sw-sqft</property>
           <property>fcs/elevator-pos-deg2</property>
           <value>0.0035</value>
       </product>
    </function>

  </axis>

  <axis name="DRAG">

    <function name="aero/force/Drag_mach">
       <description>Drag due to mach</description>
        <product>
          <property>aero/qbar-psf</property>
          <property>metrics/Sw-sqft</property>
          <table>
            <independentVar lookup="row">velocities/mach</independentVar>
            <tableData>
             0.00 0.000
             0.80 0.000
             0.95 0.015
             1.10 0.025
             1.21 0.015
             1.80 0.010
            </tableData>
          </table>
        </product>
    </function>

    <function name="aero/force/Drag_basic">
       <description>Drag at zero lift</description>
       <product>
          <property>aero/qbar-psf</property>
          <property>metrics/Sw-sqft</property>
          <table>
            <independentVar lookup="row">aero/alpha-deg</independentVar>
            <tableData>
             -90    1.500
             -15    0.031
              0     0.024
              15    0.031
              90    1.500
            </tableData>
          </table>
       </product>
    </function>

    <function name="aero/force/Drag_induced">
       <description>Induced drag</description>
         <product>
           <property>aero/qbar-psf</property>
           <property>metrics/Sw-sqft</property>
           <property>aero/cl-squared</property>
           <value>0.12</value>
         </product>
    </function>

    <function name="aero/force/Drag_flap">
       <description>Drag due to flaps</description>
         <product>
           <property>aero/qbar-psf</property>
           <property>metrics/Sw-sqft</property>
           <property>fcs/flap-pos-deg</property>
           <value> 0.00500 </value>
         </product>
    </function>

    <function name="aero/force/Drag_gear">
       <description>Drag due to gear</description>
         <product>
           <property>aero/qbar-psf</property>
           <property>metrics/Sw-sqft</property>
           <property>gear/gear-pos-norm</property>
           <value>0.009</value>
         </product>
    </function>

    <function name="aero/force/Drag_speedbrake">
       <description>Drag due to speedbrakes</description>
         <product>
           <property>aero/qbar-psf</property>
           <property>metrics/Sw-sqft</property>
           <property>fcs/speedbrake-pos-norm</property>
           <value>0.024</value>
         </product>
    </function>

    <function name="aero/force/Drag_beta">
       <description>Drag due to sideslip</description>
       <product>
          <property>aero/qbar-psf</property>
          <property>metrics/Sw-sqft</property>
          <table>
            <independentVar lookup="row">aero/beta-rad</independentVar>
            <tableData>
              -1.57    1.230
              -0.26    0.050
               0.00    0.000
               0.26    0.050
               1.57    1.230
            </tableData>
          </table>
       </product>
    </function>

    <function name="aero/force/Drag_elevator">
       <description>Drag due to Elevator Deflection</description>
       <product>
           <property>aero/qbar-psf</property>
           <property>metrics/Sw-sqft</property>
           <abs><property>fcs/elevator-pos-deg2</property></abs>
           <value>0.000008</value>
       </product>
    </function>

  </axis>

  <axis name="SIDE">

    <function name="aero/force/Side_beta">
       <description>Side force due to beta</description>
       <product>
           <property>aero/qbar-psf</property>
           <property>metrics/Sw-sqft</property>
           <property>aero/beta-rad</property>
           <value>-1</value>
       </product>
    </function>

  </axis>

  <axis name="ROLL">

    <function name="aero/moment/Roll_beta">
       <description>Roll moment due to beta</description>
       <product>
           <property>aero/qbar-psf</property>
           <property>metrics/Sw-sqft</property>
           <property>metrics/bw-ft</property>
           <property>aero/beta-rad</property>
           <value>-0.1</value>
       </product>
    </function>

    <function name="aero/moment/Roll_damp">
       <description>Roll moment due to roll rate</description>
       <product>
           <property>aero/qbar-psf</property>
           <property>metrics/Sw-sqft</property>
           <property>metrics/bw-ft</property>
           <property>aero/bi2vel</property>
           <property>velocities/p-aero-rad_sec</property>
           <value>-0.4</value>
       </product>
    </function>

    <function name="aero/moment/Roll_yaw">
       <description>Roll moment due to yaw rate</description>
       <product>
           <property>aero/qbar-psf</property>
           <property>metrics/Sw-sqft</property>
           <property>metrics/bw-ft</property>
           <property>aero/bi2vel</property>
           <property>velocities/r-aero-rad_sec</property>
           <value>0.15</value>
       </product>
    </function>

    <function name="aero/moment/Roll_aileron">
       <description>Roll moment due to aileron</description>
       <product>
          <property>aero/qbar-psf</property>
          <property>metrics/Sw-sqft</property>
          <property>metrics/bw-ft</property>
          <property>fcs/left-aileron-pos-deg2</property>
          <table>
            <independentVar lookup="row">aero/alpha-deg</independentVar>
            <tableData>
             -17    0.0009
              0     0.0040
              50    0.0009
            </tableData>
          </table>
       </product>
    </function>

    <function name="aero/moment/Roll_rudder">
       <description>Roll moment due to rudder</description>
       <product>
           <property>aero/qbar-psf</property>
           <property>metrics/Sw-sqft</property>
           <property>metrics/bw-ft</property>
           <property>fcs/rudder-pos-deg2</property>
           <value>0.00017</value>
       </product>
    </function>

  </axis>

  <axis name="PITCH">

    <function name="aero/moment/Pitch_alpha">
       <description>Pitch moment due to alpha</description>
       <product>
           <property>aero/qbar-psf</property>
           <property>metrics/Sw-sqft</property>
           <property>metrics/cbarw-ft</property>
           <property>aero/alpha-rad</property>
           <value>0.15</value>
       </product>
    </function>

    <function name="aero/moment/Pitch_elevator">
       <description>Pitch moment due to elevator</description>
       <product>
          <property>aero/qbar-psf</property>
          <property>metrics/Sw-sqft</property>
          <property>fcs/elevator-pos-deg2</property>
          <table>
            <independentVar lookup="row">velocities/mach</independentVar>
            <tableData>
              0.0     -0.26
              2.0     -0.08
            </tableData>
          </table>
       </product>
    </function>

    <function name="aero/moment/Pitch_TVC">
       <description>Pitch moment due to thrust vector</description>
       <product>
          <sum>
           <property>propulsion/engine[0]/thrust-lbs</property>
           <property>propulsion/engine[1]/thrust-lbs</property>
          </sum>
          <sin>
           <property>fcs/tvc-pos-norm</property>
          </sin>
          <value>-15</value>
       </product>
    </function>

    <function name="aero/moment/Pitch_damp">
       <description>Pitch moment due to pitch rate</description>
       <product>
           <property>aero/qbar-psf</property>
           <property>metrics/Sw-sqft</property>
           <property>metrics/cbarw-ft</property>
           <property>aero/ci2vel</property>
           <property>velocities/q-aero-rad_sec</property>
           <value>-5.6</value>
       </product>
    </function>

    <function name="aero/moment/Pitch_alphadot">
       <description>Pitch moment due to alpha rate</description>
       <product>
           <property>aero/qbar-psf</property>
           <property>metrics/Sw-sqft</property>
           <property>metrics/cbarw-ft</property>
           <property>aero/ci2vel</property>
           <property>aero/alphadot-rad_sec</property>
           <value>-9</value>
       </product>
    </function>

  </axis>

  <axis name="YAW">

    <function name="aero/moment/Yaw_beta">
       <description>Yaw moment due to beta</description>
       <product>
           <property>aero/qbar-psf</property>
           <property>metrics/Sw-sqft</property>
           <property>metrics/bw-ft</property>
           <property>aero/beta-rad</property>
           <value>0.12</value>
       </product>
    </function>

    <function name="aero/moment/Yaw_damp">
       <description>Yaw moment due to yaw rate</description>
       <product>
           <property>aero/qbar-psf</property>
           <property>metrics/Sw-sqft</property>
           <property>metrics/bw-ft</property>
           <property>aero/bi2vel</property>
           <property>velocities/r-aero-rad_sec</property>
           <value>-0.15</value>
       </product>
    </function>

    <function name="aero/moment/Yaw_rudder">
       <description>Yaw moment due to rudder</description>
       <product>
           <property>aero/qbar-psf</property>
           <property>metrics/Sw-sqft</property>
           <property>metrics/bw-ft</property>
           <property>fcs/rudder-pos-deg2</property>
           <table>
            <independentVar lookup="row">aero/alpha-rad</independentVar>
            <tableData>
             -2.66   0.0035
             -1.01   0.0
              0.45  -0.0035
              2.04   0.0
            </tableData>
          </table>
       </product>
    </function>

  </axis>

 </aerodynamics>

 <external_reactions>
 </external_reactions>

</fdm_config>
